# LT8642S_1_A Power Design
# Parameters
Vin_nom := 13.2 V
Vout_nom := 5 V
I_out_min := 0 A
Vin_min := 10 V
Vout_max := Vout_nom*1.05 = 5.25 V
I_out_max := 8 A
Vin_max := 15 V
Vout_min := Vout_nom*0.95 = 4.75 V
F_sw := 1.6 MHz
# FB Resistor Calcs
R_bot := 6.8
R_top_calc := R_bot*(Vout_nom/0.597 - 1 V) = 50.1514 V  # Need to fix units. 50kOhms
# Switching Frequency
# Set Fsw
Rt := (46.5/(F_sw*10^-6) - 1 s) = 28.0625 s
# Fsw OK?
# Datasheet Values
V_sw_top := 0.2 V
V_sw_bot := 0.1 V
t_on_min := 35 ns
F_sw_max_allowable := (Vout_nom + V_sw_bot)/(t_on_min*(Vin_nom - V_sw_top + V_sw_bot)) = 11123228 1/s
F_sw_max_allowable > F_sw = 1
Vin_min_allowable := (Vout_nom + V_sw_bot)/(1 - F_sw*t_on_min) - V_sw_bot + V_sw_top = 5.50254 V
Vin_min_allowable < Vin_min = 1
